*Heading
** Generated Abaqus .inp for square plate 10 x 10 with 50 divisions per edge
*Node
1, 0.000000, 0.000000, 0.0
2, 0.200000, 0.000000, 0.0
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*Element, type=CPS4
1, 1, 2, 53, 52
2, 2, 3, 54, 53
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*Elset, elset=AllElements, generate
1, 2500, 1
*Nset, nset=AllNodes, generate
1, 2601, 1
*Nset, nset=LeftEdge, generate
1, 2551, 51
*Nset, nset=RightEdge, generate
51, 2601, 51
*Nset, nset=BottomEdge, generate
1, 51, 1
*Nset, nset=TopEdge, generate
2551, 2601, 1
*Boundary
LeftEdge, 1, 1, 0.0
LeftEdge, 2, 2, 0.0
RightEdge, 1, 1, 0.0
RightEdge, 2, 2, 0.0
BottomEdge, 1, 1, 0.0
BottomEdge, 2, 2, 0.0
TopEdge, 1, 1, 0.0
TopEdge, 2, 2, 0.0
*Material, name=Steel
*Elastic
210000000000.000000, 0.300000
*Step, name=LoadStep, nlgeom=NO
*Static
1., 1., 1e-05, 1.
*Dload, elset=AllElements
P, 1000.000000
*End Step
